// COMSOL Multiphysics 5.6.0.260 model "cylinder_conduction.mph"
// Steady-State 2D Axisymmetric Heat Transfer with Conduction
// modeldescr_heat/cylinder_conduction
// This is a benchmark problem for a 2D axisymmetric steady-state thermal analysis with heat flux, temperature, and insulation boundary conditions. The temperature field from the analysis is compared with a NAFEMS benchmark solution.
// Outline of the model tree

Geometry
  geom1 "Geometry 1" (2D axisymmetric, length unit m)
    r1: Rectangle | pos = {0.02, 0}; size = {0.08, 0.14}
    pt1: Point | p = {0.02 0.02, 0.04 0.1}; pid = {1, 2}
    fin: Finalize "Form Union"

Physics
  ht: HeatTransfer "Heat Transfer in Solids" on all domains
    dependent variable T
    solid1: SolidHeatTransferModel "Solid 1" (default)
      k_mat = userdef
      k = 52
      rho_mat = userdef
      rho = 0
      Cp_mat = userdef
      Cp = 0
    init1: init "Initial Values 1" (default)
    axi1: AxialSymmetry (default)
    ins1: ThermalInsulation (default)
    temp1: TemperatureBoundary "Temperature 1" on boundaries 2, 5, 6 | T0 = 273.15[K]
    hf1: HeatFluxBoundary "Heat Flux 1" on boundaries 3 | q0 = 5e5

Mesh
  mesh1 "Mesh 1" (physics-controlled)

Studies
  std1 "Study 1"
    stat: Stationary

Solver configurations
  sol1 "Solution 1" (study std1)
    v1: Variables "Dependent Variables 1"
    s1: Stationary "Stationary Solver 1"
      fc1: FullyCoupled | linsolver = d1; initstep = 0.01; minstep = 1.0E-6; maxiter = 50
      d1: Direct "Direct, temperature (ht)" | linsolver = pardiso; pivotperturb = 1.0E-13

Datasets
  dset1: Solution | solution = sol1
  rev1: Revolve2D "Revolution 2D" | data = dset1; startangle = -90; revangle = 225
  cpt1: CutPoint2D | data = dset1; pointx = 0.04; pointy = 0.04

Derived values
  pev1: EvalPoint "Point Evaluation 1" | data = cpt1; table = tbl1; expr = T

Tables
  tbl1: Table
    // Point Evaluation 1
    Temperature (K), Point: (0.04, 0.04)
    332.956

Plots
  pg1: PlotGroup3D "Temperature, 3D (ht)" | data = rev1
    surf1: Surface | expr = T
  pg2: PlotGroup2D "Isothermal Contours (ht)" | data = dset1; dataisaxisym = on
    con1: Contour | expr = T; levelrounding = off